*Heading
** Job name: newTubeLong Model name: Model-1-Copy-freeBlow1
** Generated by: Abaqus/CAE 6.14-1
*Preprint, echo=NO, model=NO, history=NO, contact=NO
**
** PARTS
**
*Part, name=Grip
*Node
      1,           0.,           0.,         -65.
      2,           0.,           0.,   -59.301899
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*Element, type=S4R
1,  1,  2,  5,  4
 2,  2,  3,  6,  5
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*Nset, nset=Set-6, generate
   1,  223,    1
*Elset, elset=Set-6, generate
   1,  195,    1
** Section: Grip
*Shell Section, elset=Set-6, material=PLLA
0.1, 5
*Transverse Shear
25000., 25000., 0.
*End Part
**
*Part, name=Tube
*Node
      1,           0.,  0.200000003,         -60.
      2,   3.62270975,  0.200000003,  -59.8905334
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*Element, type=S4R
 1,  1,  2, 29, 28
 2,  2,  3, 30, 29
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*Nset, nset=Straight, generate
   1,  520,    1
***********refine straight part of the tube**********************
*Elset, elset=Straight, generate
   1,  481,    1
***********************************************
** Section: Tube_Shell
*Shell Section, elset=Straight, material=PLLA
2.0, 5
*Transverse Shear
25000., 25000., 0.
***********************************************
*End Part
**
*Part, name=Rod
*Node
      1,           0.,    45.579277,         -20.
      2,          20.,    45.579277,           0.
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*Element, type=S4R
 1,  1,  3, 23, 10
 2, 10, 23, 24, 11
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*Nset, nset=Set-6, generate
   1,  358,    1
*Elset, elset=Set-6, generate
   1,  324,    1
** Section: Rod
*Shell Section, elset=Set-6, material=PLLA
0.1, 5
*Transverse Shear
25000., 25000., 0.
*End Part
**
**
** ASSEMBLY
**
*Assembly, name=Assembly
**
*Instance, name=Tube-1, part=Tube
*End Instance
**
*Instance, name=Grip-1, part=Grip
          0.,          -2.,           0.
*End Instance
**
*Instance, name=Rod-1, part=Rod
*End Instance
*********change the ref node height*****************
*Node
      1,           0.,          -60.,           0.
*Node
      2,           0.,          -10.,           0.
**node for rod
*Node
      3,           0.,           15.,           0.
********************************
**
*Nset, nset=Xsym, instance=Tube-1
   1,    79,  80,  81,  82,  83
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*Nset, nset=Zsym, instance=Tube-1
 27,  56, 57, 58, 59, 60
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*********define the rigid point*****************
*Nset, nset=topFix, instance=Tube-1, generate
  1,  54,   1
*Elset, elset=topFix, instance=Tube-1, generate
  1,  26,   1
*Elset, elset=moldFix, instance=Grip-1, generate
  1,  195,    1
*Nset, nset=moldFix, instance=Grip-1, generate
  1,  223,    1
*Elset, elset=rodFix, instance=Rod-1, generate
  1,  324,    1
*Nset, nset=rodFix, instance=Rod-1, generate
  1,  358,    1
*********define sets for temperature application**********************
*Elset, elset=tubeSurf, instance=Tube-1, generate
  1,  481,    1
*Nset, nset=tubeSurf, instance=Tube-1, generate
  1,  520,    1
*Elset, elset=tubeIn, instance=Tube-1, generate
  27,  481,    1
*Nset, nset=tubeIn, instance=Tube-1, generate
  55,  520,    1
*Nset, nset=wholeSurf
  moldFix,tubeSurf,rodFix
*Nset, nset=rigidSurf
  moldFix,rodFix
*Nset, nset=topRef
  2
*Nset, nset=tip,instance=Tube-1
  55
*Elset, elset=Record, instance=Tube-1
122,
**Four nodes:349, 384, 302,210,
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************************
*Nset, nset=zone1,instance=Tube-1
  55,  56,  57,  58,  59,  98
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*Nset, nset=zone2,instance=Tube-1
  60,  61,  62,  63,  94,  95
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*Nset, nset=zone3,instance=Tube-1
  64,  65,  66,  67,  90,  91
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*Nset, nset=zone4,instance=Tube-1
  68,  69,  70,  71,  86,  87
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*Nset, nset=zone5,instance=Tube-1
  72,  73,  74,  75,  82,  83
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*Nset, nset=zone6,instance=Tube-1
   1,   2,   4,   5,   8,   9
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*Nset, nset=zone7,instance=Tube-1
   3,   6,   7,  10,  11,  12
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*********define the surface for pressure*****************
*Surface, type=ELEMENT, name=Surf_pressure
tubeIn, SPOS
*Surface, type=ELEMENT, name=tubeOut
tubeIn, SNEG
*Surface, type=ELEMENT, name=moldSurf
moldFix, SPOS
*Surface, type=ELEMENT, name=rodSurf
rodFix, SPOS
***Surface, type=ELEMENT, name=rodSurf
**rodFix, SNEG
*********define the surface for rigid zone*****************
** Constraint: Constraint-1
*Rigid Body, ref node=2, elset=topFix
** Constraint: Constraint-2
*Rigid Body, ref node=1, elset=moldFix
** Constraint: Constraint-3
*Rigid Body, ref node=3, elset=rodFix
*End Assembly
*Amplitude, name=Amp-1
             0.,              0.,             0.1,              0.,            0.2,              1.0,            0.3,              1.0
			 0.4,              1.5
*Amplitude, name=Amp-2
             0.,              0.,             0.1,            -64.0,           0.4,              -64.0
**
** MATERIALS
**
*Material, name=PLLA
*Density
 1.33e-06,
*Depvar
     30,
*User Material, constants=20
 9.1968e+05,      0.494,      919.6,    323.4037,    140.0956,     0.1600,     2.5931e+17,     37500.
  1.403e+10,     343.15,   0.043167,    13.9822,     348.15,     6627.5,    130.0766,    329.0035
     0.2031,     0.0593,     1.00,      0.495
**
** INTERACTION PROPERTIES
**
**Apply rough fiction ************************
*Surface Interaction, name=IntProp-1
*Friction,rough
**0.3,
*Surface Behavior, pressure-overclosure=HARD
**Apply rough fiction ************************
*Surface Interaction, name=IntProp-2
*Friction
0.3,
*Surface Behavior, pressure-overclosure=HARD
**
** BOUNDARY CONDITIONS
**
** Name: Bot Type: Displacement/Rotation
*Boundary
2, 1, 1
2, 2, 2
2, 3, 3
2, 4, 4
2, 5, 5
2, 6, 6
** Name: Top Type: Displacement/Rotation
*Boundary
1, 1, 1
1, 2, 2
1, 3, 3
1, 4, 4
1, 5, 5
1, 6, 6
** Name: Top Type: Displacement/Rotation
*Boundary
tip, 1, 1
tip, 3, 3
tip, 4, 4
tip, 5, 5
tip, 6, 6
**
** Name: Top Type: Displacement/Rotation
*Boundary
3, 1, 1
3, 2, 2
3, 3, 3
3, 4, 4
3, 5, 5
3, 6, 6
** Name: X_Symm Type: Symmetry/Antisymmetry/Encastre
*Boundary
Xsym, XSYMM
** Name: Z_Symm Type: Symmetry/Antisymmetry/Encastre
*Boundary
Zsym, ZSYMM
** PREDEFINED FIELDS
**
** Name: Predefined Field-1   Type: Temperature
*Initial Conditions, type=TEMPERATURE
rigidSurf, 350.15
zone1,0.00
zone2,0.00
zone3,0.00
zone4,0.00
zone5,0.00
zone6,0.00
zone7,350.15
**
**
** INTERACTIONS
**
** Interaction: Int-2
*Contact, op=NEW
*Contact Inclusions
rodSurf , Surf_pressure
*Contact Property Assignment
 ,  , IntProp-1
**
*Contact, op=NEW
*Contact Inclusions
moldSurf , tubeOut
*Contact Property Assignment
 ,  , IntProp-2
** ----------------------------------------------------------------
**
** STEP: Step-1
**
*Step, name=Step-1, nlgeom=YES
*Dynamic, Explicit
, 0.25
*Bulk Viscosity
0.06, 1.2
**
** BOUNDARY CONDITIONS
**
** Name: Bot Type: Displacement/Rotation
*Boundary, op=NEW
2, 1, 1
2, 2, 2
2, 3, 3
2, 4, 4
2, 5, 5
2, 6, 6
** Name: Top Type: Displacement/Rotation
*Boundary, op=NEW
1, 1, 1
1, 2, 2
1, 3, 3
1, 4, 4
1, 5, 5
1, 6, 6
*Boundary, op=NEW
tip, 1, 1
tip, 3, 3
tip, 4, 4
tip, 5, 5
tip, 6, 6
** Name: Top Type: Displacement/Rotation
*Boundary, op=NEW, amplitude=Amp-2
3, 1, 1
3, 2, 2, 1
3, 3, 3
3, 4, 4
3, 5, 5
3, 6, 6
** Name: X_Symm Type: Symmetry/Antisymmetry/Encastre
*Boundary, op=NEW
Xsym, XSYMM
** Name: Z_Symm Type: Symmetry/Antisymmetry/Encastre
*Boundary, op=NEW
Zsym, ZSYMM
**
** LOADS
**
** Name: SupplyPressure   Type: Pressure
*Dsload, amplitude=Amp-1
Surf_pressure, P, 400.
**
** OUTPUT REQUESTS
**
*Restart, write, number interval=1, time marks=NO
**
** FIELD OUTPUT: F-Output-1
**
*Output, field, variable=ALL, number interval=50
**
** HISTORY OUTPUT: H-Output-2
**
*Output, history, time interval=0.01
*Element Output, elset=Record
LE11, LE22, STH, NE11, NE22, NE33, S11, S22, S33, SDV
*Node Output, nset=topRef
RF
*CONTACT OUTPUT,SURFACE=moldSurf
CAREA
**
** HISTORY OUTPUT: H-Output-1
**
*Output, history, variable=PRESELECT
*End Step
